# [component: outputs A]
A = [
    "z", 23, ":=", 0, "+", "i", "*", 0;
    "z", 24, ":=", 0, "+", "i", "*", 0.707;
    "z", 25, ":=", -0.707, "+", "i", "*", 0;
    "z", 26, ":=", 1, "+", "i", "*", 0;
    "z", 27, ":=", 0, "+", "i", "*", 0;
    "z", 28, ":=", -1, "+", "i", "*", 0;
    "z", 29, ":=", 0.707, "-", "i", "*", 0.707;
    "z", 30, ":=", 0, "-", "i", "*", 1;
    "z", 31, ":=", 0, "+", "i", "*", 0;
    "z", 32, ":=", -1, "+", "i", "*", 0
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]
pos := A[:, 1]
real := A[:, 3]
im := A[:, 7]
sgn := A[:, 4]
i := 0 .. rows(A) - 1
sgncom(i) := if(sgn[i] == "+", 1, -1)
sgnc[i] := sgncom(i)
sgn = [
    "+"; "+"; "+"; "+"; "+"; "+"; "-"; "-"; "+"; "+"
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]
sgnc = [
    1; 1; 1; 1; 1; 1; -1; -1; 1; 1
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]
im = [
    0; 0.707; 0; 0; 0; 0; 0.707; 1; 0; 0
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]
real = [
    0; 0; -0.707; 1; 0; -1; 0.707; 0; 0; -1
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]
whole := vectorize(real + sqrt(-1)*im*sgnc)
im1[i] := sgnc[i]*im[i]*(-1)
im1 = [
    0; -0.707; 0; 0; 0; 0; 0.707; 1; 0; 0
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]
samples := 0 .. 255
max := 0 .. 255
samples[max, 0] := 0
samples[max, 1] := 0
samples[pos[i], 0] := real[i]
samples[pos[i], 1] := im1[i]
samples = [
    0, 0;
    0, 0;
    0, 0;
    0, 0;
    0, 0;
    0, 0;
    0, 0;
    0, 0;
    0, 0;
    0, 0
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]
M := 0 .. 255
z[M] := samples[M, 0] + samples[M, 1]*1i
iF4 := ICFFT(z)
iF3 := icfft(z)
iF3 = [
    -0.375; 0.284009; 0.774977; 0.579553; -0.174758; -0.744437; -0.549109; 0.152369; 0.542743; 0.2241
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]
iF4 = [
    -6; -10.4259; -7.12278; -0.262953; 5.79577; 8.70757; 7.01251; 0.628368; -6.91554; -9.72074
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]
N := last(iF3)
N = 255  # Количество временных отсчетов
n := 0 .. 255
j := 0 .. N
# Вектор для отсчетов
Fs := 400000  # Частота дискретизации
τ := 1/Fs
τ = 2.5e-6  # Временной интервал дискретизации
F_0 := Fs/N
F_0 = 1568.63
# Фундаментальная Частота Преобразования
# Разрешающая Способность БПФ
t[j] := τ*j  # Вектор времени
x[n] := 16/sqrt(256)*sum(z[m]*e^(1i*2*π*n*m/256), m = 0 .. 256 - 1)
Ts := τ*N
Ts = 0.0006375
Ts := N/Fs  # Общая длительность дискретного сигнала
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x[n] = [
    -6; -10.4259; -7.12278; -0.262953 + 3.30291e-15i; 5.79577; 8.70757; 7.01251; 0.628368 + 8.27116e-15i; -6.91554; -9.72074
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]
